// SBML level 3 version 1

model main()

  // Compartments:
  compartment cyto = 3 micrometers_cubed;
  compartment pm = 2 micrometers_squared;  // 2-D

  // Species:
  species A in cyto = 10/cyto;  // substance in micromoles
  species X in pm = 1000/pm;  // substance in item
  species B in pm = 0;  // substance in item

  // Parameters:
  kf = 5 per_uM_seconds;
  kr = 0.1 per_second;

  // Reactions:
  : A + X -> B; kf*(A*cyto + X*pm);

  // Unit definitions:
  unit micrometers_squared = (1e-12 metre)^2;
  unit micrometers_cubed = (1e-18 metre)^3;
  unit micromoles = 1e-6 mole;
  unit per_second = 1 / second;
  unit per_uM_seconds = 1 / (6.022141e-17 second);
end
